*Heading
** Job name: Job-1 Model name: Job-1
** Generated by: Abaqus/CAE 2021
*Preprint, echo=NO, model=NO, history=NO, contact=NO
**
** PARTS
**
*Part, name=PART-1
*Node
      1,           0.,    6.3499999,   5.86153841
      2,           0.,    6.3499999,   12.6999998
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*Element, type=C3D20R
  1,    5,   42,  195,   61,    1,   22,  171,   41,  662,  661,  660,  659,  663,  664,  665,
      666,  668,  667,  669,  670
  2,   42,   43,  196,  195,   22,   23,  172,  171,  673,  672,  671,  661,  674,  675,  676,
      664,  667,  677,  678,  669
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*Nset, nset=_PICKEDSET2, internal, generate
    1,  2403,     1
*Elset, elset=_PICKEDSET2, internal, generate
   1,  455,    1
** Section: Section-1-_PICKEDSET2
*Solid Section, elset=_PICKEDSET2, material=MATERIAL-1
,
*End Part
**
**
** ASSEMBLY
**
*Assembly, name=Assembly
**
*Instance, name=PART-1-1, part=PART-1
*End Instance
**
*Nset, nset=_PICKEDSET5, internal, instance=PART-1-1
   13,   14,   15,   16,   17,   18
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*Elset, elset=_PICKEDSET5, internal, instance=PART-1-1
  76,  82,  88,  94, 100, 101
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*Nset, nset=_PICKEDSET6, internal, instance=PART-1-1
    9,   10,   11,   12,   13,   15
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*Elset, elset=_PICKEDSET6, internal, instance=PART-1-1
  40,  45,  50,  55,  60,  65
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*Nset, nset=_PICKEDSET7, internal, instance=PART-1-1
    1,    2,    5,    6,   17,   18
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*Elset, elset=_PICKEDSET7, internal, instance=PART-1-1
   1,   2,   3,   4,   5,   6
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*Nset, nset=_PICKEDSET8, internal, instance=PART-1-1
    2,    3,    6,    7,    9,   11
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*Elset, elset=_PICKEDSET8, internal, instance=PART-1-1
   7,  14,  21,  28,  35,  36
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*End Assembly
**
** MATERIALS
**
*Material, name=MATERIAL-1
*Depvar
     29,
*User Material, constants=25
0.,    45.,     0.,     1.,     2.,    12.,170000.,124300.
 75000.,     0.,     0.,     1.,  0.001,  83.33,     0.,   250.
   190.,    2.5,    1.4,     0.,    16.,     0.,     0.,     0.
     0.,
**
** BOUNDARY CONDITIONS
**
** Name: Disp-BC-1 Type: Symmetry/Antisymmetry/Encastre
*Boundary
_PICKEDSET5, ZSYMM
** Name: Disp-BC-2 Type: Symmetry/Antisymmetry/Encastre
*Boundary
_PICKEDSET6, YSYMM
** Name: Disp-BC-3 Type: Symmetry/Antisymmetry/Encastre
*Boundary
_PICKEDSET7, XSYMM
** ----------------------------------------------------------------
**
** STEP: Loading
**
*Step, name=Loading, nlgeom=YES, inc=5000
*Static
0.05, 500., 0.0001, 10.
**
** BOUNDARY CONDITIONS
**
** Name: Disp-BC-4 Type: Displacement/Rotation
*Boundary
_PICKEDSET8, 3, 3, -6.35
**
** OUTPUT REQUESTS
**
*Restart, write, frequency=0
**
** FIELD OUTPUT: F-Output-1
**
*Output, field
*Node Output
CF, RF, U
*Element Output, directions=YES
LE, PE, PEEQ, PEMAG, S, SDV
*Contact Output
CDISP, CSTRESS
**
** HISTORY OUTPUT: H-Output-1
**
*Output, history, variable=PRESELECT
*End Step
