*Heading
** Job name: Job-1 Model name: testcase
** Generated by: Abaqus/CAE 2021
*Preprint, echo=NO, model=NO, history=NO, contact=NO
**
** PARTS
**
*Part, name=DREAM
*Node
      1,           0.,           0.,           0.
      2,           1.,           0.,           0.
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*Element, type=C3D8
   1,  123,    2,    1,  122,  134,   13,   12,  133
   2,  124,    3,    2,  123,  135,   14,   13,  134
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*Elset, elset=GRAIN-6
   1,   2,   3,   4,   5,   6
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*Elset, elset=GRAIN-5
  31,  41,  51, 131, 141, 151
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*Elset, elset=GRAIN-3
   44,   45,   46,   47,   53,   54
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*Elset, elset=GRAIN-2
  52,  61,  62,  71,  72,  73
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*Elset, elset=GRAIN-1
  60,  70,  79,  80,  89,  90
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*Elset, elset=GRAIN-4
 110, 208, 209, 210, 220, 307
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*Elset, elset=PHASE-1, generate
    1,  1000,     1
** Section: Section-1-GRAIN-6
*Solid Section, elset=GRAIN-6, material=MATERIAL-GRAIN6
,
** Section: Section-2-GRAIN-5
*Solid Section, elset=GRAIN-5, material=MATERIAL-GRAIN5
,
** Section: Section-3-GRAIN-3
*Solid Section, elset=GRAIN-3, material=MATERIAL-GRAIN3
,
** Section: Section-4-GRAIN-2
*Solid Section, elset=GRAIN-2, material=MATERIAL-GRAIN2
,
** Section: Section-5-GRAIN-1
*Solid Section, elset=GRAIN-1, material=MATERIAL-GRAIN1
,
** Section: Section-6-GRAIN-4
*Solid Section, elset=GRAIN-4, material=MATERIAL-GRAIN4
,
*End Part
**
**
** ASSEMBLY
**
*Assembly, name=Assembly
**
*Instance, name=DREAM-1, part=DREAM
*End Instance
**
*Nset, nset=_PickedSet9, internal, instance=DREAM-1, generate
    1,  1321,    11
*Nset, nset=_PickedSet10, internal, instance=DREAM-1
    1,    2,    3,    4,    5,    6
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*Nset, nset=_PickedSet11, internal, instance=DREAM-1, generate
   1,  121,    1
*Nset, nset=_PickedSet12, internal, instance=DREAM-1, generate
   11,  1331,    11
*End Assembly
**
** MATERIALS
**
*Material, name=MATERIAL-GRAIN1
*Depvar
     29,
*User Material, constants=25
 199.709,  86.631, 175.759,      1.,      2.,     12., 170000., 124300.
  75000.,      0.,      0.,      1.,   0.001,     20.,      0.,    250.
    190.,     2.5,     1.4,      0.,     16.,      0.,      0.,      0.
      0.,
*Material, name=MATERIAL-GRAIN2
*Depvar
     29,
*User Material, constants=25
 120.323, 115.839, 257.105,      1.,      2.,     12., 170000., 124300.
  75000.,      0.,      0.,      1.,   0.001,     20.,      0.,    250.
    190.,     2.5,     1.4,      0.,     16.,      0.,      0.,      0.
      0.,
*Material, name=MATERIAL-GRAIN3
*Depvar
     29,
*User Material, constants=25
 146.712, 96.073, 18.757,     1.,     2.,    12.,170000.,124300.
 75000.,     0.,     0.,     1.,  0.001,    20.,     0.,   250.
   190.,    2.5,    1.4,     0.,    16.,     0.,     0.,     0.
     0.,
*Material, name=MATERIAL-GRAIN4
*Depvar
     29,
*User Material, constants=25
 248.159,  86.243, 287.253,      1.,      2.,     12., 170000., 124300.
  75000.,      0.,      0.,      1.,   0.001,     20.,      0.,    250.
    190.,     2.5,     1.4,      0.,     16.,      0.,      0.,      0.
      0.,
*Material, name=MATERIAL-GRAIN5
*Depvar
     29,
*User Material, constants=25
 117.453, 72.981, 92.645,     1.,     2.,    12.,170000.,124300.
 75000.,     0.,     0.,     1.,  0.001,    20.,     0.,   250.
   190.,    2.5,    1.4,     0.,    16.,     0.,     0.,     0.
     0.,
** MATERIALS
**
*Material, name=MATERIAL-GRAIN6
*Depvar
     29,
*User Material, constants=25
 263.029, 125.679,  92.645,      1.,      2.,     12., 170000., 124300.
  75000.,      0.,      0.,      1.,   0.001,     20.,      0.,    250.
    190.,     2.5,     1.4,      0.,     16.,      0.,      0.,      0.
      0.,
**
** BOUNDARY CONDITIONS
**
** Name: BC-1 Type: Displacement/Rotation
*Boundary
_PickedSet11, 3, 3
** Name: BC-2 Type: Displacement/Rotation
*Boundary
_PickedSet9, 1, 1
** Name: BC-3 Type: Displacement/Rotation
*Boundary
_PickedSet10, 2, 2
** ----------------------------------------------------------------
**
** STEP: Loading
**
*Step, name=Loading, nlgeom=YES, inc=10000, solver=ITERATIVE
*Static
0.05, 10., 1e-05, 1.
**
** BOUNDARY CONDITIONS
**
** Name: BC-4 Type: Displacement/Rotation
*Boundary
_PickedSet12, 1, 1, 1.
**
** OUTPUT REQUESTS
**
*Restart, write, frequency=0
**
** FIELD OUTPUT: F-Output-1
**
*Output, field
*Node Output
CF, RF, U
*Element Output, directions=YES
LE, PE, PEEQ, PEMAG, S, SDV
*Contact Output
CDISP, CSTRESS
**
** HISTORY OUTPUT: H-Output-1
**
*Output, history, variable=PRESELECT
*End Step
